// SBML level 2 version 4
// dcterms:bibliographicCitation: http://identifiers.org/pubmed/12881417

function function_for_modified_reaction_1(NFAT_phosphorylated, k1, stimulus)
  k1*stimulus*NFAT_phosphorylated;
end

function function_for_modified_reaction_0(k1, stimulus, substrate)
  k1*stimulus*substrate;
end

model Tomida2003___NFAT_functions_Calcium_Oscillation()
  // Tomida2003 - Calcium Oscillatory-induced translocation of nuclear factor of activated T cells
  // Tomida2003 - NFAT functions Calcium Oscillation
  // This model is described in the article:
  // NFAT functions as a working memory of Ca2+ signals in decoding Ca2+ oscillation.
  // Tomida T, Hirose K, Takizawa A, Shibasaki F, Iino M.
  // EMBO J. 2003 Aug; 22(15): 3825-3832
  // Abstract:
  // Transcription by the nuclear factor of activated T cells (NFAT) is regulated by the frequency of Ca(2+) oscillation. However, why and how Ca(2+) oscillation regulates NFAT activity remain elusive. NFAT is dephosphorylated by Ca(2+)-dependent phosphatase calcineurin and translocates from the cytoplasm to the nucleus to initiate transcription. We analyzed the kinetics of dephosphorylation and translocation of NFAT. We show that Ca(2+)-dependent dephosphorylation proceeds rapidly, while the rephosphorylation and nuclear transport of NFAT proceed slowly. Therefore, after brief Ca(2+) stimulation, dephosphorylated NFAT has a lifetime of several minutes in the cytoplasm. Thus, Ca(2+) oscillation induces a build-up of dephosphorylated NFAT in the cytoplasm, allowing effective nuclear translocation, provided that the oscillation interval is shorter than the lifetime of dephosphorylated NFAT. We also show that Ca(2+) oscillation is more cost-effective in inducing the translocation of NFAT than continuous Ca(2+) signaling. Thus, the lifetime of dephosphorylated NFAT functions as a working memory of Ca(2+) signals and enables the control of NFAT nuclear translocation by the frequency of Ca(2+) oscillation at a reduced cost of Ca(2+) signaling.
  // This model is hosted on BioModels Database and identified by: BIOMD0000000678.
  // To cite BioModels Database, please use: Chelliah V et al. BioModels: ten-year anniversary. Nucl. Acids Res. 2015, 43(Database issue):D542-8.
  // To the extent possible under law, all copyright and related or neighbouring rights to this encoded model have been dedicated to the public domain worldwide. Please refer to CC0 Public Domain Dedication for more information.
  // hasTaxon taxonomy:9606
  // biomodels.db:MODEL0912160005
  // biomodels.db:BIOMD0000000678
  // isDescribedBy pubmed:12881417
  // biomodels.db:MODEL0912160005
  // isVersionOf GO:0033173

  // Compartments:
  compartment Jurkat_cell = 1;  // isVersionOf BTO:0000661

  // Species:
  species NFAT_phosphorylated in Jurkat_cell = 1;  // isVersionOf PR:000003112; isVersionOf uniprot:Q12968
  species NFAT_dephosphorylated in Jurkat_cell = 0;  // isVersionOf PR:000003112; isVersionOf uniprot:Q12968
  species $NFAT_transported in Jurkat_cell;  // isVersionOf uniprot:Q12968; occursIn GO:0005634; isVersionOf PR:000003112
  species $stimulus in Jurkat_cell;  // isVersionOf ncit:C41210
  species dNFAT_species in Jurkat_cell;

  // Parameters:
  k1 = 0.359;
  k2 = 0.147;
  k3 = 0.06;
  k4 = 0.035;
  stim_frequency = 3;
  var dNFAT; dNFAT is "dNFAT%";
  var pNFAT; pNFAT is "pNFAT%";
  var tNFAT; tNFAT is "tNFAT%";
  stim_duration = 1;
  Initial_for_stim_duration = stim_duration;
  Initial_for_stim_frequency = stim_frequency;

  // Assignment rules:
  NFAT_transported := 1 - NFAT_phosphorylated - NFAT_dephosphorylated;
  pNFAT := 100*NFAT_phosphorylated;
  tNFAT := 100*NFAT_transported;
  dNFAT := 100*NFAT_dephosphorylated;
  dNFAT_species := 1*dNFAT;
  stimulus := piecewise(1, time - floor(time/Initial_for_stim_frequency)*Initial_for_stim_frequency < Initial_for_stim_duration, 0);

  // Reactions:
  Dephosphorylation: NFAT_phosphorylated => NFAT_dephosphorylated; Jurkat_cell*function_for_modified_reaction_1(NFAT_phosphorylated, k1, stimulus);  // modifiers: stimulus; isEncodedBy ncit:C17275; isEncodedBy CHEBI:53439; isVersionOf GO:0016311
  Phosphorylation: NFAT_dephosphorylated => NFAT_phosphorylated; Jurkat_cell*k2*NFAT_dephosphorylated;  // isVersionOf GO:0016310
  Translocation: NFAT_dephosphorylated => $NFAT_transported; Jurkat_cell*k3*NFAT_dephosphorylated;  // isVersionOf GO:0051531
  Nuclear_export: $NFAT_transported => NFAT_phosphorylated; Jurkat_cell*k4*NFAT_transported;  // isVersionOf GO:0051168

  // Unit definitions:
  unit volume = 1e-3 litre;
  unit substance = 1e-3 mole;
end
